// COMSOL Multiphysics 5.2.0.166 model "SimpleWeibull.mph"
// RRAM_transient_fpe
// Outline of the model tree

Functions
  an1: Analytic "Drift (Velocity) Term" | funcname = vel_equation; expr = c0*(((kParam-1.0)/(x-xshift))-((kParam/(lambDa^kParam))*((x-xshift)^(kParam-1.0)))); args = {x, c0, xshift, kParam, lambDa}; argunit = m, 1/s, m, 1, 1; fununit = m/s
  an2: Analytic | funcname = normcdfinv; expr = erfinv(2*x-1.0); args = x
  an3: Analytic "Potential Well Profile" | funcname = pot_well; expr = -(kParam-1.0)*log(x-c1)+(lambParam^(-1.0*kParam))*((x-c1)^(kParam)); args = {x, c1, kParam, lambParam}; argunit = m, m, 1, 1; fununit = J

Variables
  var1 "Variables 1" on selection geom1_i1_dom
    c0 = 100[1/s]
    c1 = -0.00001[m]
    v_eq = vel_equation(x,c0,c1,k1,lamb)
    diffCoeff = 3[m^2/s]
    rho_cdf = intop1(rho[1/m]*(x<=dest(x)))
    rho_ccdf = intop1(rho[1/m]*(x>=dest(x)))
    k1 = 2.0
    lamb = 0.1
    rho_quart = normcdfinv(rho_cdf)
    rhoc_quart = normcdfinv(rho_ccdf)

Couplings
  intop1: Integration on selection geom1_i1_dom

Geometry
  geom1 "Geometry 1" (1D, length unit m)
    i1: Interval "StateSpace" | intervals = one; p1 = 0; p2 = 1; p = {0, 1}
    fin: Finalize "Form Union"

Physics
  FPE: WeakFormPDE "Fokker-Planck Equation" on all domains
    dependent variable rho
    Units.CustomSourceTermUnit = m^-2
    wfeq1: WeakFormPDE (default) | weak = rhot*test(rho)-v_eq*rho*test(rhox)+diffCoeff*rhox*test(rhox)
    zflx1: ZeroFluxBoundary "Zero Flux 1" (default)
    init1: init "Initial Values 1" (default) | rho = 1

Mesh
  mesh1 "MainMesh"
    size: MeshSizeDefault | table = default; hmax = 0.002; hauto = 1; custom = on
    edg1: Edge on remaining entities

Studies
  std1 "Study 1"
    time: Transient "Time Dependent"
      tunit = s
      tlist = range(0,100000/1,100000)
      rtol = 0.0000001
      initmethod = init
      initstudy = zero

Solver configurations
  sol1 "Solution 1" (study std1)
    v1: Variables "Dependent Variables 1"
    t1: Time "Time-Dependent Solver 1" | tlist = range(0,100000/1,100000)
      dDef: Direct
      fc1: FullyCoupled | linsolver = dDef

Datasets
  dset1: Solution | solution = sol1

Derived values
  int1: IntLine "Line Integration 1" on all domains
    data = dset1
    table = tbl1
    expr = rho
    unit = m
    method = auto
    dataseries = none

Tables
  tbl1: Table
    // Line Integration 1 (rho)
    Time (ns) | Dependent variable rho (m)
    10 | 1

Plots
  pg1: PlotGroup1D "1D Plot Group 1" | data = dset1
    lngr1: LineGraph on all dimension-1 entities | expr = rho; xdata = expr; xdataexpr = x
    lngr2: LineGraph | expr = rho_cdf; unit = 1; xdata = expr; xdataexpr = x
    lngr3: LineGraph | expr = rho_ccdf; unit = 1; xdata = expr; xdataexpr = x
    lngr4: LineGraph | expr = rho_quart; xdata = expr; xdataexpr = x
    lngr5: LineGraph | expr = rhoc_quart; xdata = expr; xdataexpr = x