// COMSOL Multiphysics 5.2.0.166 model "spintronic_transient.mph"
// Outline of the model tree

Functions
  an1: Analytic "Drift (Velocity) Term (X-Component)" | funcname = vel_eqn0; expr = uni_torque_0(x,y,z,gamFac,dampFac,Huax_0,Huax_1,Huax_2); args = {x, y, z}; argunit = m, m, m; fununit = m/s
  an2: Analytic "Drift (Velocity) Term (Y-Component)" | funcname = vel_eqn1; expr = uni_torque_1(x,y,z); args = {x, y, z}; argunit = 1, 1, 1; fununit = m/s
  an3: Analytic "Drift (Velocity) Term (Z-Component)" | funcname = vel_eqn2; expr = uni_torque_2(x,y,z); args = {x, y, z}; argunit = 1, 1, 1; fununit = m/s
  an4: Analytic "LLG Precession Torque (X-Component)" | funcname = llg_precess_0; expr = Hy*z-Hz*y; args = {x, y, z, Hx, Hy, Hz}; argunit = m, m, m, 1, 1, 1
  an5: Analytic "LLG Precession Torque (Y-Component)" | funcname = llg_precess_1; expr = Hz*x-Hx*z; args = {x, y, z, Hx, Hy, Hz}; argunit = m, m, m, 1, 1, 1
  an6: Analytic "LLG Precession Torque (Z-Component)" | funcname = llg_precess_2; expr = Hx*y-Hy*x; args = {x, y, z, Hx, Hy, Hz}; argunit = m, m, m, 1, 1, 1
  an7: Analytic "LLG Damping Torque (X-Component)" | funcname = llg_damp_0; expr = Hx - x*(Hx*x+Hy*y+Hz*z); args = {x, y, z, Hx, Hy, Hz}; argunit = m, m, m, 1, 1, 1
  an8: Analytic "LLG Damping Torque (Y-Component)" | funcname = llg_damp_1; expr = Hy - y*(Hx*x+Hy*y+Hz*z); args = {x, y, z, Hx, Hy, Hz}; argunit = m, m, m, 1, 1, 1
  an9: Analytic "LLG Damping Torque (Z-Component)" | funcname = llg_damp_2; expr = Hz - z*(Hx*x+Hy*y+Hz*z); args = {x, y, z, Hx, Hy, Hz}; argunit = m, m, m, 1, 1, 1
  an10: Analytic "Vector Dot Product" | funcname = uax_vec_dot; expr = (x*ux+y*uy+z*uz)/((ux*ux+uy*uy+uz*uz)*sqrt(x*x+y*y+z*z)); args = {x, y, z, ux, uy, uz}; argunit = m, m, m, 1, 1, 1; fununit = 1
  an11: Analytic "Uniaxial Anisotropy Torque (X-component)"
    funcname = uni_torque_0
    expr = gamma0/(1+alpha0*alpha0)*(llg_precess_0(x,y,z,H_1,H_1,H_2)+alpha0*llg_damp_0(x,y,z,H_0,H_1,H_2))
    args = {x, y, z, gamma0, alpha0, H_0, H_1, H_2}
    argunit = m, m, m, 1, 1, 1, 1, 1
    fununit = m/s
  an12: Analytic "Uniaxial Anisotropy Torque (Y-component)"
    funcname = uni_torque_1
    expr = gamma_/(1+alpha_*alpha_)*(llg_precess_1(x,y,z,H_1,H_1,H_2)+alpha_*llg_damp_1(x,y,z,H_0,H_1,H_2))
    args = {x, y, z, gamma_, alpha_, H_0, H_1, H_2}
    argunit = m, m, m, 1, 1, 1, 1, 1
    fununit = m/s
  an13: Analytic "Uniaxial Anisotropy Torque (Z-component)"
    funcname = uni_torque_2
    expr = gamma_/(1+alpha_*alpha_)*(llg_precess_2(x,y,z,H_1,H_1,H_2)+alpha_*llg_damp_2(x,y,z,H_0,H_1,H_2))
    args = {x, y, z, gamma_, alpha_, H_0, H_1, H_2}
    argunit = m, m, m, 1, 1, 1, 1, 1
    fununit = m/s

Variables
  var1 "Global Variables"
    mu0 = mu0_const
    hbar = hbar_const
  var2 "Uniaxial Anisotropy Variables"
    uax_0 = 0
    uax_1 = 0
    uax_2 = 1
    Ku2 = 44[1/J]*kBT
    Huni = 2*Ku2/Msat
    Huax_0 = Huni*uax_0*uax_vec_dot(x, y, z, uax_0, uax_1, uax_2)
    Huax_1 = Huni*uax_1*uax_vec_dot(x,y,z,uax_0,uax_1,uax_2)
    Huax_2 = Huni*uax_2*uax_vec_dot(x,y,z,uax_0,uax_1,uax_2)
    uni_torque_0 = gamFac/(1+dampFac*dampFac)*(llg_precess_0(x,y,z,Huax_1,Huax_1,Huax_2)+dampFac*llg_damp_0(x,y,z,Huax_0,Huax_1,Huax_2))
    uni_torque_1 = gamFac/(1+dampFac*dampFac)*(llg_precess_1(x,y,z,Huax_0,Huax_1,Huax_2)+dampFac*llg_damp_1(x,y,z,Huax_0,Huax_1,Huax_2))
    uni_torque_2 = gamFac/(1+dampFac*dampFac)*(llg_precess_2(x,y,z,Huax_1,Huax_1,Huax_2)+dampFac*llg_damp_2(x,y,z,Huax_0,Huax_1,Huax_2))
  var3 "Local Variables"
    Temperature = 300[K]
    kBT = k_B_const*Temperature
    Msat = 800e3
    gamFac = 2.215e5[m/H]*mu0_const
    dampFac = 0.03
    L_width = 50e-9[m]
    L_length = 50e-9[m]
    L_thick = 2e-9[m]
    mag_Vol = L_width*L_length*L_thick
    diffCoeff = 1.0[m^5/J/s]*gamFac*kBT/(Msat*mag_Vol)
  var4 "Demagnetization Variables"
    Nxx = 0
    Nyy = 0
    Nzz = 0
    Hdemag_x = Nxx*uax_vec_dot(x, y, z, 1, 0, 0)
    Hdemag_y = Nyy*uax_vec_dot(x, y, z, 1, 1, 0)
    Hdemag_z = Nzz*uax_vec_dot(x, y, z, 0, 0, 1)

Geometry
  geom1 "MainGeometry" (3D, length unit m)
    sph1: Sphere "StateSpace" | type = surface; r = 1
    fin: Finalize "Form Union"

Physics
  w: WeakFormPDE on all domains
    dependent variable rho
    wfeq1: WeakFormPDE (default)
      weak = rhot*test(rho)-rho*(vel_eqn0(x,y,z)*test(rhox)+vel_eqn1(x,y,z)*test(rhoy)+vel_eqn2(x,y,z)*(rhoz)))+diffCoeff*(rhox*test(rhox)+rhoy*test(rhoy)+rhoz*test(rhoz))
    zflx1: ZeroFluxBoundary "Zero Flux 1" (default)
    init1: init "Initial Values 1" (default) | rho = 1.0/(4.0*pi)

Mesh
  mesh1 "SphereMesh" (physics-controlled)
    size: MeshSizeDefault | hauto = 1

Studies
  std1 "Study 1"
    time: Transient "Time Dependent" | tunit = ns; tlist = range(0,1000/1,1000); rtol = 1e-12

Solver configurations
  sol1 "Solution 1" (study std1)
    v1: Variables "Dependent Variables 1"
    t1: Time "Time-Dependent Solver 1" | tlist = range(0,1000/1,1000)
      dDef: Direct
      fc1: FullyCoupled | linsolver = dDef

Datasets
  dset1: Solution | solution = sol1

Plots
  pg1: PlotGroup3D "3D Plot Group 1" | data = dset1
    mesh1: Mesh
    surf1: Surface | expr = rho